// SBML level 3 version 1

model yeast_galactose_cme_ode()
  // Galactose Switch CME-ODE Model

  // Compartments:
  compartment cytoplasm = 3.57e-14;
  compartment nucleoplasm = 3.57e-15;

  // Species:
  substanceOnly species GAE in cytoplasm = 100000;
  substanceOnly species R1 in cytoplasm = 1;
  substanceOnly species R2 in cytoplasm = 1;
  substanceOnly species R3 in cytoplasm = 1;
  substanceOnly species R4 in cytoplasm = 1;
  substanceOnly species reporter_rna in cytoplasm = 1;
  substanceOnly species R80 in cytoplasm = 1;
  substanceOnly species G1 in cytoplasm = 132;
  substanceOnly species G2 in cytoplasm = 1157;
  substanceOnly species G3 in cytoplasm = 4342;
  substanceOnly species G3i in cytoplasm = 0;
  substanceOnly species G4 in cytoplasm = 1;
  substanceOnly species G4d in cytoplasm = 309;
  substanceOnly species reporter in cytoplasm = 132;
  substanceOnly species G80 in cytoplasm = 1;
  substanceOnly species G80C in cytoplasm = 1;
  substanceOnly species G80d in cytoplasm = 157;
  substanceOnly species G80Cd in cytoplasm = 157;
  substanceOnly species G80G3i in cytoplasm = 0;
  substanceOnly species GAI in cytoplasm = 1;
  substanceOnly species DG1 in nucleoplasm = 0;
  substanceOnly species DG1_G4d in nucleoplasm = 0;
  substanceOnly species DG1_G4d_G80d in nucleoplasm = 1;
  substanceOnly species DG2 in nucleoplasm = 0;
  substanceOnly species DG2_G4d in nucleoplasm = 0;
  substanceOnly species DG2_G4d_G80d in nucleoplasm = 1;
  substanceOnly species DG3 in nucleoplasm = 0;
  substanceOnly species DG3_G4d in nucleoplasm = 0;
  substanceOnly species DG3_G4d_G80d in nucleoplasm = 1;
  substanceOnly species DGrep in nucleoplasm = 0;
  substanceOnly species DGrep_G4d in nucleoplasm = 0;
  substanceOnly species DGrep_G4d_G80d in nucleoplasm = 1;
  substanceOnly species DG80 in nucleoplasm = 0;
  substanceOnly species DG80_G4d in nucleoplasm = 0;
  substanceOnly species DG80_G4d_G80d in nucleoplasm = 1;
  substanceOnly species G2GAI in cytoplasm = 0;
  substanceOnly species G2GAE in cytoplasm = 0;
  substanceOnly species G1GAI in cytoplasm = 0;

  // Parameters:
  fd = 35830900000;
  rd = 1.666667e-5;
  f1_4 = 35830900;
  r1_4 = 6.410256e-5;
  f2_4 = 358309;
  r2_4 = 0.001421949;
  f1_5 = 35830900;
  r1_5 = 0.001683502;
  f2_5 = 358309;
  r2_5 = 0.00224982;
  f1 = 35830900;
  r1 = 0.000672043;
  f2 = 358309;
  r2 = 0.008841733;
  fi = 266.940205;
  ri = 14.83333;
  fd3i80 = 9214274;
  dr3i80 = 0.0002660267;
  dp_gal3 = 0.0001925;
  dp_gal3gal80 = 9.625e-5;
  alpha1 = 0.01229833;
  alpha2 = 0.04236667;
  alpha3 = 0.007109529;
  ir_gal4 = 0.0001650333;
  alpha_rep = 0.01906667;
  alpha80 = 0.01010833;
  dr_gal1 = 0.0003726667;
  dr_gal2 = 0.001283667;
  dr_gal3 = 0.0004443333;
  dr_gal4 = 0.0004126667;
  dr_rep = 0.0005776667;
  dr_gal80 = 0.0004813333;
  ip_gal1 = 0.03209;
  ip_gal2 = 0.2246317;
  ip_gal3 = 0.9241967;
  ip_gal4 = 0.178485;
  ip_rep = 0.09627;
  ip_gal80 = 0.06122833;
  dp_gal1 = 6.418333e-5;
  dp_gal2 = 6.418333e-5;
  dp_gal4 = 0.0001155167;
  dp_rep = 0.0001925;
  dp_gal80 = 0.0001155167;
  k_TR = 4350;
  kr_TR = 2392.5;
  kf_TR = 0.00031353;
  kf_GK = 0.00040243;
  kr_GK = 1842.5;
  kcat_GK = 3350;

  // Reactions:
  g4_dimerize: 2 G4 => G4d; fd*G4*G4;
  g4_dedimerize: G4d => 2 G4; rd*G4d;
  g1_g4_bind: DG1 + G4d => DG1_G4d; f1_4*DG1*G4d;
  trans_g1: DG1_G4d => DG1_G4d + R1; alpha1*DG1_G4d;
  transl_g1: R1 => R1 + G1; ip_gal1*R1;
  ode_G2_GAI_bind: GAI + G2 => G2GAI; kf_TR*GAI*G2;
  ode_G2GAI_unbind: G2GAI => GAI + G2; kr_TR*G2GAI;
  ode_G2_GAE_bind: GAE + G2 => G2GAE; kf_TR*GAE*G2;
  ode_G2GAE_unbind: G2GAE => GAE + G2; kr_TR*G2GAE;
  ode_G2GAE_to_G2GAI: G2GAE => G2GAI; k_TR*G2GAE;
  ode_G2GAI_to_G2GAE: G2GAI => G2GAE; k_TR*G2GAI;
  ode_G1_GAI_bind: GAI + G1 => G1GAI; kf_GK*GAI*G1;
  ode_G1GAI_unbind: G1GAI => GAI + G1; kr_GK*G1GAI;
  ode_G1_metabolize: G1GAI => G1; kcat_GK*G1GAI;
end
