// SBML level 3 version 1

model yeast_galactose_rdme_ode()
  // Galactose Switch RDME-ODE Model

  // Compartments:
  compartment extracellular = 1; extracellular is "Extracellular Space";
  compartment cellWall = 0.05; cellWall is "Cell Wall";
  compartment nuclearEnvelope = 0.01; nuclearEnvelope is "Nuclear Envelope";
  compartment mitochondria = 0.1; mitochondria is "Mitochondria";
  compartment vacuole = 0.2; vacuole is "Vacuoles";
  compartment plasmaMembrane = 0.01; plasmaMembrane is "Plasma Membrane";
  compartment nucleoplasm = 0.1; nucleoplasm is "Nucleoplasm";
  compartment cytoplasm = 0.5; cytoplasm is "Cytoplasm";
  compartment endoplasmicReticulum = 0.05; endoplasmicReticulum is "Endoplasmic Reticulum";
  compartment pmaER = 0.02; pmaER is "Plasma Membrane Associated ER";
  compartment chromosome = 0.01; chromosome is "Chromosome";
  compartment cytoRibosomes = 0.05; cytoRibosomes is "Cytosolic Ribosomes";
  compartment pmaRibosomes = 0.01; pmaRibosomes is "PMA Ribosomes";

  // Species:
  substanceOnly species GAE in extracellular = 100000;
  substanceOnly species GAI in cytoplasm = 1;
  substanceOnly species G1 in cytoplasm = 132;
  substanceOnly species G2 in plasmaMembrane = 1157;
  substanceOnly species G3 in cytoplasm = 4342;
  substanceOnly species G3i in cytoplasm = 0;
  substanceOnly species G4 in nucleoplasm = 1;
  substanceOnly species G4d in nucleoplasm = 309;
  substanceOnly species G80 in cytoplasm = 70;
  substanceOnly species G80d in nucleoplasm = 200;
  substanceOnly species G80G3i in cytoplasm = 0;
  substanceOnly species G2GAE in plasmaMembrane = 0;
  substanceOnly species G2GAI in plasmaMembrane = 0;
  substanceOnly species G1GAI in cytoplasm = 0;
  substanceOnly species R1 in nucleoplasm = 1;
  substanceOnly species R2 in nucleoplasm = 1;
  substanceOnly species R3 in nucleoplasm = 1;
  substanceOnly species R4 in nucleoplasm = 1;
  substanceOnly species R80 in nucleoplasm = 1;
  substanceOnly species ribosome in cytoRibosomes = 20000;
  substanceOnly species DG1 in chromosome = 1;
  substanceOnly species DG1_G4d in chromosome = 0;
  substanceOnly species DG1_G4d_G80d in chromosome = 0;
  substanceOnly species DG2 in chromosome = 1;
  substanceOnly species DG2_G4d in chromosome = 0;
  substanceOnly species DG2_G4d_G80d in chromosome = 0;
  substanceOnly species DG3 in chromosome = 1;
  substanceOnly species DG3_G4d in chromosome = 0;
  substanceOnly species DG3_G4d_G80d in chromosome = 0;
  substanceOnly species DG80 in chromosome = 1;
  substanceOnly species DG80_G4d in chromosome = 0;
  substanceOnly species DG80_G4d_G80d in chromosome = 0;

  // Parameters:
  fd = 35830900000;
  rd = 1.666667e-5;
  f1_4 = 35830900;
  r1_4 = 6.410256e-5;
  f2_4 = 358309;
  r2_4 = 0.001421949;
  f1_5 = 35830900;
  r1_5 = 0.001683502;
  f2_5 = 358309;
  r2_5 = 0.00224982;
  f1 = 35830900;
  r1 = 0.000672043;
  f2 = 358309;
  r2 = 0.008841733;
  fi = 266.940205;
  ri = 14.83333;
  fd3i80 = 9214274;
  dr3i80 = 0.0002660267;
  dp_gal3 = 0.0001925;
  dp_gal3gal80 = 9.625e-5;
  alpha1 = 0.01229833;
  alpha2 = 0.04236667;
  alpha3 = 0.007109529;
  ir_gal4 = 0.0001650333;
  alpha_rep = 0.01906667;
  alpha80 = 0.01010833;
  dr_gal1 = 0.0003726667;
  dr_gal2 = 0.001283667;
  dr_gal3 = 0.0004443333;
  dr_gal4 = 0.0004126667;
  dr_rep = 0.0005776667;
  dr_gal80 = 0.0004813333;
  ip_gal1 = 0.03209;
  ip_gal2 = 0.2246317;
  ip_gal3 = 0.9241967;
  ip_gal4 = 0.178485;
  ip_rep = 0.09627;
  ip_gal80 = 0.06122833;
  dp_gal1 = 6.418333e-5;
  dp_gal2 = 6.418333e-5;
  dp_gal4 = 0.0001155167;
  dp_rep = 0.0001925;
  dp_gal80 = 0.0001155167;
  k_TR = 4350;
  kr_TR = 2392.5;
  kf_TR = 0.00031353;
  kf_GK = 0.00040243;
  kr_GK = 1842.5;
  kcat_GK = 3350;

  // Reactions:
  ode_G2_GAE_bind: GAE + G2 => G2GAE; kf_TR*GAE*G2;
  ode_G2GAE_unbind: G2GAE => GAE + G2; kr_TR*G2GAE;
  ode_G1_metabolize: G1GAI => G1; kcat_GK*G1GAI;
  g4_dimerize: 2 G4 => G4d; fd*G4*G4;
  g1_g4_bind: DG1 + G4d => DG1_G4d; f1_4*DG1*G4d;
  trans_g1: DG1_G4d => DG1_G4d + R1; alpha1*DG1_G4d;
  transl_g1: R1 => R1 + G1; ip_gal1*R1;
end
